folder simulations: version=32
  simulation AgMIP
    memo
             This .apsim file was created by the APSIM AgMIP translator.
             Assumptions made by translator:
                * Soil AirDry values are set to 0.05 of LL15 for all layers
                * Soil/Crop LL values are set to LL15 for all layers
                * Soil/Crop KL values are set to 0.1 for all layers
                * Soil/Crop XF values are set to 1.0 for all layers (i.e. no sub soil contraints)
                * Surface organic matter C:N ratio is not changed to reflect residue type.
              Todo:
                * Surface organic matter previous crop isn't being set - should use crop code in InitialConditions.
    clock
      start_date = $simulation.management.plantingDate  # Enter the start date of the simulation
      end_date = 31/12/1950  # Enter the end date of the simulation
    metfile met: filename=UFGA8201MZ.met
    summaryfile
    area paddock
      soil: Longitude=-82.37
        Comment = Millhopper Fine Sand  # Comments
        SoilType = Loamy,silic,hyperth Arenic Paleudult  # Soil description
        Latitude = 29.63  # Latitude (WGS84)
        DataSource = Gainesville
        Water
          Layer:
            Thickness (mm)  BD (g/cc)  AirDry (mm/mm)  LL15 (mm/mm)  DUL (mm/mm)  SAT (mm/mm)
            0.0             1.3        0.0247          0.026         0.096        0.23
            0.0             0.0        0.02375         0.025         0.086        0.0
            0.0             1.4        0.02375         0.025         0.086        0.0
            0.0             1.4        0.02375         0.025         0.086        0.0
            0.0             1.45       0.0266          0.028         0.09         0.0
            0.0             1.45       0.0266          0.028         0.09         0.0
            0.0             1.45       0.02755         0.029         0.13         0.0
            0.0             1.2        0.0665          0.07          0.258        0.36
          SoilCrop Barley
            Layer:
              Thickness (mm)  LL (mm/mm)  KL (/day)  XF (0-1)
              0.0             0.026       0.1        1
              0.0             0.025       0.1        1
              0.0             0.025       0.1        1
              0.0             0.025       0.1        1
              0.0             0.028       0.1        1
              0.0             0.028       0.1        1
              0.0             0.029       0.1        1
              0.0             0.07        0.1        1
        SoilWat: SummerCona=3.5; SummerU=6; SummerDate=1-Nov; WinterCona=3.5; WinterU=6; WinterDate=1-Apr; DiffusConst=40; DiffusSlope=16; Salb=0.13; Cn2Bare=73; CnRed=20; CnCov=0.8
          Layer:
            Thickness (mm)  SWCON (0-1)
            0.0             0.3
            0.0             0.3
            0.0             0.3
            0.0             0.3
            0.0             0.3
            0.0             0.3
            0.0             0.3
            0.0             0.3
        SoilOrganicMatter: RootCn=40; RootWt=200; SoilCn=12.5; EnrACoeff=7.4; EnrBCoeff=0.2
          Layer:
            Thickness (mm)  OC (Total %)  FBiom (0-1)  FInert (0-1)
            0.0             2.0           0.025        0.4
            0.0             1.0           0.025        0.4
            0.0             1.0           0.025        0.4
            0.0             0.5           0.025        0.4
            0.0             0.1           0.025        0.4
            0.0             0.1           0.025        0.4
            0.0             0.04          0.025        0.4
            0.0             0.24          0.025        0.4
        Analysis
          Layer:
            Thickness (mm)  PH (1:5 water)
            0.0             0.0
            0.0             0.0
            0.0             0.0
            0.0             0.0
            0.0             0.0
            0.0             0.0
            0.0             0.0
            0.0             0.0
        Sample Initial conditions
          Date = $simulation.initialcondition.date  # Sample date
      surfaceom SurfaceOrganicMatter
        PoolName = OrganicMatter  # Organic Matter pool name
        type = wheat  # Organic Matter type
        mass = 1000.0  # Initial surface residue (kg/ha)
        cnr = 80  # C:N ratio of initial residue
        standing_fraction = 0  # Fraction of residue standing
      fertiliser
      irrigation
        automatic_irrigation = off
        asw_depth = 600  # Depth to which ASW is calculated. (mm)
        crit_fr_asw = 0.5  # Fraction of ASW below which irrigation is applied (0-1.0)
        irrigation_efficiency = 1  # Efficiency of the irrigation. (0-1.0)
        irrigation_allocation = off  # Allocation limits
        allocation = 0  # Allocation in mm
        default_no3_conc = 0.0  # Nitrate concentration (ppm N)
        default_nh4_conc = 0.0  # Ammonium concentration (ppm N)
        default_cl_conc = 0.0  # Chloride concentration (ppm Cl)
      wheat
      folder Manager folder
        operations
          26/02/1982  Maize sow plants = 7.2, sowing_depth = 7.0, cultivar = McCurdy 84aa, row_spacing = 61, crop_class = plantsow
          04/03/1982  irrigation apply amount = 13 (mm)
          07/04/1982  fertiliser apply amount = 27(kg/ha), type = no3_n (), depth = 10 (mm)
          12/04/1982  fertiliser apply amount = 35(kg/ha), type = no3_n (), depth = 10 (mm)
          17/05/1982  fertiliser apply amount = 54(kg/ha), type = no3_n (), depth = 10 (mm)
          15/06/1978
          25/04/1979
          14/06/1978
          25/02/1980
        manager Harvesting rule
          # Harvesting criteria
          crop = wheat  # Enter name of crop to harvest when ripe
          on end_of_day:
```
           if [crop].StageName = 'harvest_ripe' or [crop].plant_status = 'dead' then
              [crop]  harvest
              [crop]  end_crop
           endif
```
      outputfile: filename=AgMIP.out; title=AgMIP
        variables
          variables: dd/mm/yyyy as Date, biomass, yield, grain_protein, grain_size, esw
        events Reporting Frequency: event=harvesting
