folder WheatValidation: version=29
  folder shared
    soil Yucheng: LocalName=Yucheng; Site=Yucheng; Region=China
      SoilType = unknown  # Soil description
      NearestTown = Ginninderra
      NaturalVegetation = Unknown
      InitWater Initial water
        PercentMethod: Percent=1.00; Distributed=Filled from top
      Water
        Layer:
          Thickness (mm)  BD (g/cc)  AirDry (mm/mm)  LL15 (mm/mm)  DUL (mm/mm)  SAT (mm/mm)
          100             1.37       0.04            0.06          0.28         0.4
          100             1.5        0.04            0.08          0.32         0.4
          100             1.46       0.06            0.1           0.32         0.448
          100             1.42       0.06            0.15          0.3          0.45
          100             1.42       0.06            0.2           0.3          0.45
          100             1.41       0.06            0.25          0.32         0.46
          100             1.4        0.06            0.28          0.35         0.45
          100             1.41       0.1             0.28          0.35         0.45
          100             1.4        0.1             0.3           0.37         0.45
          100             1.46       0.1             0.28          0.41         0.449
          100             1.4        0.1             0.26          0.41         0.47
          100             1.49       0.1             0.32          0.4          0.43
          100             1.5        0.1             0.35          0.4          0.43
          100             1.46       0.1             0.37          0.4          0.44
          100             1.45       0.1             0.37          0.4          0.45
        SoilCrop Wheat
          Layer:
            Thickness (mm)  LL (mm/mm)  KL (/day)  XF (0-1)
            100             0.06        0.06       1
            100             0.08        0.06       1
            100             0.1         0.06       1
            100             0.15        0.06       1
            100             0.2         0.06       1
            100             0.25        0.06       0.8
            100             0.28        0.06       0.6
            100             0.28        0.06       0.4
            100             0.3         0.06       0.4
            100             0.28        0.06       0.4
            100             0.26        0.06       0.4
            100             0.32        0.06       0.4
            100             0.35        0.06       0.4
            100             0.37        0.06       0.4
            100             0.37        0.06       0.4
      SoilWat: SummerCona=2; SummerU=4; SummerDate=1-may; WinterCona=2; WinterU=2; WinterDate=1-oct; DiffusConst=40; DiffusSlope=16; Salb=0.13; Cn2Bare=72; CnRed=20; CnCov=0.8
        Layer:
          Thickness (mm)  SWCON (0-1)  MWCON (0-1)
          100             0.4          1
          100             0.4          1
          100             0.4          1
          100             0.4          1
          100             0.4          1
          100             0.4          1
          100             0.4          1
          100             0.4          1
          100             0.4          1
          100             0.4          1
          100             0.4          1
          100             0.4          1
          100             0.4          1
          100             0.4          1
          100             0.4          1
      SoilOrganicMatter: RootCn=40; RootWt=2000; SoilCn=14.5; EnrACoeff=1; EnrBCoeff=1
        Layer:
          Thickness (mm)  OC (Total %)  FBiom (0-1)  FInert (0-1)
          100             0.83          0.04         0.36
          100             0.35          0.03         0.35
          100             0.33          0.03         0.45
          100             0.22          0.02         0.45
          100             0.22          0.02         0.59
          100             0.22          0.02         0.6
          100             0.19          0.02         0.84
          100             0.17          0.02         0.8
          100             0.15          0.01         0.8
          100             0.12          0.01         0.99
          100             0.11          0.01         0.99
          100             0.1           0.01         0.99
          100             0.1           0.01         0.99
          100             0.1           0.01         0.99
          100             0.1           0.01         0.99
      Analysis
        Layer:
          Thickness (mm)  PH (1:5 water)
          100             5.8
          100             5.9
          100             6.6
          100             6.8
          100             7
          100             7.1
          100             7.2
          100             7.3
          100             7.4
          100             7.4
          100             7.6
          100             7.8
          100             8
          100             8.2
          100             8.3
      Sample Initial nitrogen
        Layer:
          Thickness (mm)  NO3 (ppm)  NH4 (ppm)
          100             10         1
          100             15         1
          100             10         1
          100             8          1
          100             5          1
          100             2          1
          100             1          1
          100             1          1
          100             1          1
          100             1          1
          100             1          1
          100             1          1
          100             1          1
          100             1          1
          100             0          0
    variables DailyVariables
      variable:
        dd/mm/yyyy as Date  # Date (dd/mm/yyyy)
        day  # Day of Year
        year  # Year
        wheat.zadok_stage  # Plant stage code
        wheat.StageName  # Biomass
        wheat.biomass  # Biomass
        wheat.yield  # Yield
        wheat.grain_size  # Size of each grain
        wheat.biomass_wt  # Biomass weight
        wheat.biomass_n  # N in total biomass
        wheat.lai  # Leaf area index
        wheat.HeadTotalWt  # Weight of heads
        wheat.grain_wt  # Weight of grain
        wheat.LeafGreenWt  # Weight of leaf
        wheat.HeadTotalN  # N in heads
        wheat.grain_n  # N in grain
        wheat.LeafGreenN  # N in leaf
        wheat.StemGreenN  # N in stem
        wheat.StemGreenWt  # Weight of stem
        wheat.grain_no  # Grain number
        sw_dep()  # Soil water - layered (mm)
        wheat.n_conc_grain  # N concentration in grain
        wheat.grain_protein  # grain protein content
        wheat.swdef_photo  # Soil water deficit in photosynthesis
        wheat.swdef_expan  # Soil water deficit in leaf expansion
        wheat.nfact_photo  # N factor for photosynthesis
        wheat.nfact_expan  # N factor for leaf expansion
        wheat.root_depth  # plant rooting depth
        wheat.ep  # wheat water use
        eo  # potential et
        water_table  # Water Table Depth
        node_no
        et
        plants
    events DailyVariables Events: event=Daily  # End of day
    manager ETcalc
      on init:
```
et = 0
```
      on end_of_day:
```
Et = es + wheat.ep
```
    metfile met: filename=Yucheng.met
    soil Moora94: LocalName=Moora; Site=Moora; Region=WA
      SoilType = sand  # Soil description
      NearestTown = Moora
      NaturalVegetation = Banksia Prionotes
      Water
        Layer:
          Thickness (mm)  BD (g/cc)  AirDry (mm/mm)  LL15 (mm/mm)  DUL (mm/mm)  SAT (mm/mm)
          50              1.58       0.03            0.03          0.18         0.32
          50              1.68       0.03            0.03          0.13         0.32
          100             1.67       0.04            0.06          0.12         0.32
          100             1.78       0.05            0.06          0.11         0.31
          200             1.85       0.05            0.06          0.095        0.3
          200             1.8        0.05            0.07          0.095        0.31
          200             1.8        0.05            0.07          0.1          0.31
          300             1.8        0.05            0.08          0.11         0.31
          300             1.8        0.05            0.1           0.12         0.31
          1000            1.8        0.05            0.1           0.12         0.31
        SoilCrop Wheat
          Layer:
            Thickness (mm)  LL (mm/mm)  KL (/day)  XF (0-1)
            50              0.03        0.06       0.2
            50              0.03        0.06       0.66
            100             0.06        0.05       0.66
            100             0.06        0.05       0.8
            200             0.06        0.04       0.8
            200             0.07        0.04       0.8
            200             0.07        0.04       0.8
            300             0.08        0.04       0.8
            300             0.1         0.03       0.8
            1000            0.1         0.03       0.8
      SoilWat: SummerCona=2; SummerU=6; SummerDate=1-Nov; WinterCona=2; WinterU=6; WinterDate=1-Apr; DiffusConst=88; DiffusSlope=35; Salb=0.13; Cn2Bare=60; CnRed=20; CnCov=0.8
        Layer:
          Thickness (mm)  SWCON (0-1)  MWCON (0-1)
          50              0.75         1
          50              0.65         1
          100             0.6          1
          100             0.7          1
          200             0.7          1
          200             0.5          1
          200             0.5          1
          300             0.5          1
          300             0.4          1
          1000            1            1
      SoilOrganicMatter: RootCn=20; RootWt=1500; SoilCn=15; EnrACoeff=1; EnrBCoeff=1
        Layer:
          Thickness (mm)  OC (Total %)  FBiom (0-1)  FInert (0-1)
          50              0.9           0.04         0.1
          50              0.9           0.04         0.1
          100             0.39          0.03         0.1
          100             0.1           0.02         0.2
          200             0.01          0.01         0.8
          200             0.01          0.01         0.9
          200             0.01          0.01         0.9
          300             0.01          0.01         0.9
          300             0.01          0.01         0.9
          1000            0.01          0.01         0.9
      Analysis
        Layer:
          Thickness (mm)  PH (1:5 water)
          50              7
          50              7
          100             7
          100             7
          200             7
          200             7
          200             7
          300             7
          300             7
          1000            7
      Sample Initial nitrogen
        Layer:
          Thickness (mm)  NO3 (ppm)   NH4 (ppm)
          50              5.46982     2.42022
          50              7.44983     1.59998
          100             7.18984     0.909989
          100             3.58995     0.329975
          200             2.69997     0.33
          200             0.639994    0.13
          200             0.649994    0.09
          300             0.419997    0.1
          300             0.00999993  0.15
          1000            0.00999995  0.15
      Sample Initial water
        Layer:
          Thickness (mm)  SW (mm/mm)
          50              0.14
          50              0.141
          100             0.139
          100             0.124
          200             0.103
          200             0.112
          200             0.116
          300             0.119
          300             0.127
          1000            0.12
  folder ChinaFlux
    simulation Yucheng02
      clock
        start_date = 1/10/2002  # Select the start date of the simulation
        end_date = 15/6/2003  # Select the end date of the simulation
      summaryfile
      metfile met: filename=Yucheng.met
      area paddock
        outputfile: filename=Yucheng02.out; title=Yucheng02
          variables DailyVariables -> /WheatValidation/shared/DailyVariables
          events DailyVariables Events -> /WheatValidation/shared/DailyVariables Events
        folder Manager folder
          manager Sow on a fixed date
            # Sowing criteria
            date = 15/10/2002  # Enter sowing date (d/m/yyyy)
            # Sowing parameters
            crop = Wheat  # Enter name of crop to sow
            density = 100  # Enter sowing density (plants/m2)
            depth = 30  # Enter sowing depth (mm)
            cultivar = lorikeet  # Enter cultivar
            row_spacing = 250  # Enter row spacing (m)
            on start_of_day:
```
               if (paddock_is_fallow() = 1 and today = date('[date]')) then
                 [crop] sow plants =[density], sowing_depth = [depth], cultivar = [cultivar], row_spacing = [row_spacing]
               endif
```
          manager Harvesting rule
            # Harvesting criteria
            crop = Wheat  # Enter name of crop to harvest when ripe
            on end_of_day:
```
           if [crop].StageName = 'harvest_ripe' or [crop].plant_status = 'dead' then
              [crop]  harvest
              [crop]  end_crop
           endif
```
          manager Fertilise at sowing
            # When should fertiliser be applied
            modulename = wheat  # On which module should the event come from
            eventname = sowing  # On which event should fertiliser be applied
            # Fertiliser application details
            fertmodule = fertiliser  # Module used to apply the fertiliser
            fert_amount_sow = 182.5  # Amount of starter fertiliser at sowing (kg/ha)
            fert_type_sow = NO3_N  # Sowing fertiliser type
            on [modulename].[eventname]:
```
           [fertmodule] apply amount = [fert_amount_sow] (kg/ha), depth = 50 (mm), type = [fert_type_sow]
```
          manager ETcalc -> /WheatValidation/shared/ETcalc
        wheat
        irrigation
          automatic_irrigation = off  # switch
          asw_depth = 600.0  # Depth to which ASW is calculated. (mm)
          crit_fr_asw = 0.9  # Fraction of ASW below which irrigation is applied (0-1.0)
          irrigation_efficiency = 1.0  # Efficiency of the irrigation. (0-1.0)
          default_no3_conc = 0.0  # Nitrate concentration (ppm N)
          default_nh4_conc = 0.0  # Ammonium concentration (ppm N)
          default_cl_conc = 0.0  # Chloride concentration (ppm Cl)
        manager Irrigator
          on start_of_day:
```
! Paper says irrigation was applied but soil water data suggests otherwise.
 if day = 60 and year = 2003 then
   irrigation apply amount = 122
 endif
```
        fertiliser
        manager OutputCalculator
          on end_of_day:
```
sw30 = sw_dep(1) + sw_dep(2) + sw_dep(3)
sw60 = sw_dep(4) + sw_dep(5) + sw_dep(6)
sw90 = sw_dep(7) + sw_dep(8) + sw_dep(9)
sw120 = sw_dep(10) + sw_dep(11) + sw_dep(12)
sw150 = sw_dep(13) + sw_dep(14) + sw_dep(15)
```
        soil Yucheng -> /WheatValidation/shared/Yucheng
          Sample Initial nitrogen
            Layer:
              Thickness (mm)  NO3 (ppm)  NH4 (ppm)
              100             10         1
              100             15         1
              100             10         1
              100             8          1
              100             5          1
              100             2          1
              100             1          1
              100             1          1
              100             1          1
              100             1          1
              100             1          1
              100             1          1
              100             1          1
              100             1          1
              100             0          0
          Sample Initial water
            Layer:
              Thickness (mm)  SW (mm/mm)
              100             0.27
              100             0.28
              100             0.23
              100             0.24
              100             0.26
              100             0.3
              100             0.3
              100             0.32
              100             0.35
              100             0.32
              100             0.32
              100             0.37
              100             0.39
              100             0.39
              100             0.39
        surfaceom Surface Organic Matter
          PoolName = canola  # Organic Matter pool name
          type = canola  # Organic Matter type
          mass = 1000  # Initial surface residue (kg/ha)
          cnr = 20  # C:N ratio of initial residue
          standing_fraction = 0  # Fraction of residue standing
        outputfile SWoutput: filename=Yucheng02 SWoutput.out; title=Yucheng02 SWoutput
          variables
            variable:
              dd/mm/yyyy as Date  # Date (dd/mm/yyyy)
              sw30
              sw60
              sw90
              sw120
              sw150
          events Reporting Frequency: event=Daily  # End of daily simulation time step
    simulation Yucheng03
      clock
        start_date = 20/10/2003  # Select the start date of the simulation
        end_date = 15/06/2004  # Select the end date of the simulation
      metfile met -> /WheatValidation/shared/met
      summaryfile
      area paddock
        outputfile: filename=Yucheng03.out; title=Yucheng03
          variables DailyVariables -> /WheatValidation/shared/DailyVariables
          events DailyVariables Events -> /WheatValidation/shared/DailyVariables Events
        folder Manager folder
          manager Sow on a fixed date
            # Sowing criteria
            date = 23/10/2003  # Enter sowing date (d/m/yyyy)
            # Sowing parameters
            crop = Wheat  # Enter name of crop to sow
            density = 100  # Enter sowing density (plants/m2)
            depth = 30  # Enter sowing depth (mm)
            cultivar = lorikeet  # Enter cultivar
            row_spacing = 250  # Enter row spacing (m)
            on start_of_day:
            script: same as in ChinaFlux.Yucheng02.paddock.Manager folder.Sow on a fixed date
          manager Harvesting rule
            # Harvesting criteria
            crop = Wheat  # Enter name of crop to harvest when ripe
            on end_of_day:
            script: same as in ChinaFlux.Yucheng02.paddock.Manager folder.Harvesting rule
          manager Fertilise at sowing: same as ChinaFlux.Yucheng02.paddock.Manager folder.Fertilise at sowing
          manager ETcalc -> /WheatValidation/shared/ETcalc
        wheat
        irrigation: same as ChinaFlux.Yucheng02.paddock.Irrigation
        manager Irrigator
          on start_of_day:
```
 

if day = 79 and year = 2004 then
   irrigation apply amount = 137.5
endif

if day = 104 and year = 2004 then
   irrigation apply amount = 97.5
endif
```
        fertiliser
        manager OutputCalculator
          on end_of_day:
          script: same as in ChinaFlux.Yucheng02.paddock.OutputCalculator
        soil Yucheng -> /WheatValidation/shared/Yucheng
          Sample Initial nitrogen: same as ChinaFlux.Yucheng02.paddock.Yucheng.Initial nitrogen
          Sample Initial water
            Layer:
              Thickness (mm)  SW (mm/mm)
              100             0.2
              100             0.28
              100             0.3
              100             0.3
              100             0.31
              100             0.33
              100             0.35
              100             0.37
              100             0.4
              100             0.42
              100             0.42
              100             0.42
              100             0.41
              100             0.41
              100             0.41
        surfaceom Surface Organic Matter
          PoolName = canola  # Organic Matter pool name
          type = canola  # Organic Matter type
          mass = 1000  # Initial surface residue (kg/ha)
          cnr = 20  # C:N ratio of initial residue
          standing_fraction = 0.0  # Fraction of residue standing
        outputfile SWoutput: filename=Yucheng03 SWoutput.out; title=Yucheng03 SWoutput
          variables
            variable:
              dd/mm/yyyy as Date  # Date (dd/mm/yyyy)
              sw30
              sw60
              sw90
              sw120
              sw150
          events Reporting Frequency: event=Daily  # End of daily simulation time step
    simulation Yucheng04
      clock
        start_date = 13/10/2004  # Select the start date of the simulation
        end_date = 15/06/2005  # Select the end date of the simulation
      summaryfile
      metfile met: filename=Yucheng.met
      area paddock
        outputfile: filename=Yucheng04.out; title=Yucheng04
          variables DailyVariables -> /WheatValidation/shared/DailyVariables
          events DailyVariables Events -> /WheatValidation/shared/DailyVariables Events
        folder Manager folder
          manager Sow on a fixed date
            # Sowing criteria
            date = 14/10/2004  # Enter sowing date (d/m/yyyy)
            # Sowing parameters
            crop = Wheat  # Enter name of crop to sow
            density = 100  # Enter sowing density (plants/m2)
            depth = 30  # Enter sowing depth (mm)
            cultivar = lorikeet  # Enter cultivar
            row_spacing = 250  # Enter row spacing (m)
            on start_of_day:
            script: same as in ChinaFlux.Yucheng02.paddock.Manager folder.Sow on a fixed date
          manager Harvesting rule
            # Harvesting criteria
            crop = Wheat  # Enter name of crop to harvest when ripe
            on end_of_day:
            script: same as in ChinaFlux.Yucheng02.paddock.Manager folder.Harvesting rule
          manager Fertilise at sowing: same as ChinaFlux.Yucheng02.paddock.Manager folder.Fertilise at sowing
          manager ETcalc -> /WheatValidation/shared/ETcalc
        wheat
        irrigation: same as ChinaFlux.Yucheng02.paddock.Irrigation
        manager Irrigator
          on start_of_day:
```
 

if day = 91 and year = 2005 then
   irrigation apply amount = 128.7
endif

if day = 121 and year = 2005 then
   irrigation apply amount = 100.7
endif
```
        fertiliser
        manager OutputCalculator
          on end_of_day:
          script: same as in ChinaFlux.Yucheng02.paddock.OutputCalculator
        soil Yucheng -> /WheatValidation/shared/Yucheng
          Sample Initial nitrogen: same as ChinaFlux.Yucheng02.paddock.Yucheng.Initial nitrogen
          Sample Initial water
            Layer:
              Thickness (mm)  SW (mm/mm)
              100             0.17
              100             0.26
              100             0.27
              100             0.27
              100             0.28
              100             0.31
              100             0.34
              100             0.35
              100             0.37
              100             0.4
              100             0.4
              100             0.39
              100             0.39
              100             0.39
              100             0.39
        surfaceom Surface Organic Matter
          PoolName = canola  # Organic Matter pool name
          type = canola  # Organic Matter type
          mass = 1000  # Initial surface residue (kg/ha)
          cnr = 20  # C:N ratio of initial residue
          standing_fraction = 0.0  # Fraction of residue standing
        outputfile SWoutput: filename=Yucheng04 SWoutput.out; title=Yucheng04 SWoutput
          variables
            variable:
              dd/mm/yyyy as Date  # Date (dd/mm/yyyy)
              sw30
              sw60
              sw90
              sw120
              sw150
          events Reporting Frequency: event=Daily  # End of daily simulation time step
